# Задание 1
n := 1
x := 2
y := (sqrt(x^3 + n) + cos(|n*x - 1|)^2)/(nthroot((x^5 + sin(x) + n), 4)*cos(π*(x + n)/4))
y = -1.92924
# Задание 2
x1 := 7
y1 := 10
z := -3
p := if(x1 > y1, sin(x1) + 3*|y1| - z^2, (y1 + 3)*ln(|x1 + 1|)/sqrt(z^2 + 1))
p = 8.5485
q := if(x1 > y1 and x1 < 1, cos(x1) + 2*|y1 + 1| - z, (x1*y1 + 3)/sqrt(y1^2 + 5))
q = 7.12407
w := if(x1 < y1 or y1 ≥ 10, x1^2 + 2*(y1*x1 + 1) - z, (x1^-3*y1^2 + 3)*sqrt(z^2 + 7))
w = 194
# Задание 3
x2 := -2, -1.6 .. 2
f(x2) := (x2^2 - n*x2 + sin(x2))*sqrt(|x2 - cos(n*x2)|)
x2 = [-2; -1.6; -1.2; -0.8; -0.4; 0; 0.4; 0.8; 1.2; 1.6; 2]
f(x2) = [6.40671; 3.96101; 2.13485; 0.884082; 0.196062; 0; 0.107857; 0.17913; 1.07268; 2.5012; 4.5222]
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# Задание 4
A := runif(3, -3, 3)
B := runif(3, -3, 3)
C := runif(3, -3, 3)
transpose(A) = [-2.99239, -1.84006, 0.510037]
transpose(B) = [-0.898151, 1.93703, -1.95523]
transpose(C) = [1.26297, -1.17608, -2.45153]
B1 := -B
B1 = [0.898151; -1.93703; 1.95523]
s := A*B
V := B1×C
w := (A×B)*C
s = -1.87387
w = 28.9773
V = [7.04819; 4.67124; 1.39011]
dA := sqrt(A[0]^2 + A[1]^2 + A[2]^2)
dB := sqrt(B[0]^2 + B[1]^2 + B[2]^2)
dC := sqrt(C[0]^2 + C[1]^2 + C[2]^2)
Array := [dA; dB; dC]
Array = [3.5497; 2.89511; 2.99805]
Max := max(Array)
Max = 3.5497  # Это С
i := 0, 1 .. 9
j := 0, 1 .. 9
M[i, j] := -10 + floor(rnd(20))
M = [
    -8, 9, -8, -10, 0, 2, -7, -1, -9, 5;
    0, 7, 9, 0, -1, 7, 5, 9, 2, -5;
    6, -3, 3, -10, -5, 1, 6, -1, 4, -1;
    4, 1, 4, 1, -7, -2, 0, 5, -7, -1;
    3, -8, -8, 3, -2, 9, -7, 6, -7, 6;
    -7, 4, -5, 3, 4, -8, 6, 0, -2, 8;
    0, -1, 6, -1, 9, 4, -7, 6, 0, -10;
    1, 0, 6, 3, 6, -8, -4, -5, -8, 6;
    2, -5, -10, 6, -6, 1, -8, 5, 0, -2;
    3, -2, 1, 2, 0, 3, -7, -7, -1, -9
]
sum(sum(M[i, j], j = 3 .. 7), i = 3 .. 5) = 11
sum(sum(M[i, j], j = 0 .. 9), i = 0 .. 9) = -29
e^(e^□)
SumPos(A) :=
    s ← 0
    for i ∈ 0 .. 9
        for j ∈ 0 .. 9
            s ← s + A[i, j] if A[i, j] > 0
    return s
SumNeg(A) :=
    s ← 0
    for i ∈ 0 .. 9
        for j ∈ 0 .. 9
            s ← s + A[i, j] if A[i, j] < 0
    return s
SumPos(M) = 212
SumNeg(M) = -241
X := M[:, 0]
Y := transpose(M)[:, 9]
Y := transpose(Y)
Y = [3, -2, 1, 2, 0, 3, -7, -7, -1, -9]
X = [-8; 0; 6; 4; 3; -7; 0; 1; 2; 3]
X*Y = [
    -24, 16, -8, -16, 0, -24, 56, 56, 8, 72;
    0, 0, 0, 0, 0, 0, 0, 0, 0, 0;
    18, -12, 6, 12, 0, 18, -42, -42, -6, -54;
    12, -8, 4, 8, 0, 12, -28, -28, -4, -36;
    9, -6, 3, 6, 0, 9, -21, -21, -3, -27;
    -21, 14, -7, -14, 0, -21, 49, 49, 7, 63;
    0, 0, 0, 0, 0, 0, 0, 0, 0, 0;
    3, -2, 1, 2, 0, 3, -7, -7, -1, -9;
    6, -4, 2, 4, 0, 6, -14, -14, -2, -18;
    9, -6, 3, 6, 0, 9, -21, -21, -3, -27
]
# Задание 5
f1(x3) := e^(-(|x3|/3))*cos(x3)
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# Задание 6
x4 := -9, -8.75 .. 9
x4 = [
    -9; -8.75; -8.5; -8.25; -8; -7.75; -7.5; -7.25; -7; -6.75
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]
f4(x4) := if(x4 < 0, e^x4*x4^3, e^(-x4)*x4^3)
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# Задание 7
x[0] := -2*π
Δx := π/4
size := 16
i := 1 .. size
x[i] := x[0] + Δx*i
Vg(x) := sqrt(|x|)*sin(x)
X := x
Y := Vg(x)
Y = [0; 2.8164; 3.983; 2.8164; 0; -2.8164; -3.983; -2.8164; 0; 2.8164; 3.983; 2.8164; 0; -2.8164; -3.983; -2.8164; 0]
X = [-6.28319; -5.49779; -4.71239; -3.92699; -3.14159; -2.35619; -1.5708; -0.785398; 0; 0.785398; 1.5708; 2.35619; 3.14159; 3.92699; 4.71239; 5.49779; 6.28319]
WRITEPRN("X.txt") := X
WRITEPRN("Y.txt") := Y
XX := READPRN("X.txt")
YY := READPRN("Y.txt")
y[i] := Vg(x[i])
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YY = [0; 2.816; 3.983; 2.816; 0; -2.816; -3.983; -2.816; 0; 2.816; 3.983; 2.816; 0; -2.816; -3.983; -2.816; 0]
XX = [-6.283; -5.498; -4.712; -3.927; -3.142; -2.356; -1.571; -0.7854; 0; 0.7854; 1.571; 2.356; 3.142; 3.927; 4.712; 5.498; 6.283]
# Задание 8
x9 := -3 .. 3
q1(x9) := e^(-x9^2)
q2(x9) := d/dx9(q1(x9))
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# Задание 9
x911 := -15
x912 := 15
Δx91 := 1
i91 := 0 .. 42
y911 := -15
y912 := 15
Δy91 := 1
j91 := 0 .. 42
h(x91, y91) := sin(sqrt(x91^2 + y91^2))/sqrt(x91^2 + y91^2)
x91[i91] := -15 + (30/43)*i91
y91[j91] := -15 + (30/43)*j91
Z[i91, j91] := h(x91[i91], y91[j91])
# [component: inputs Z]
# Задача 10
x100 := -5 .. 5
f10(x100) := x100^2 + (x100 - 2)*sin(x100) - 5
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root(f10(x100), x100) = [-1.32936; -1.32936; -1.32936; -1.32936; -1.32936; -1.32936; 2.19967; 2.19967; 2.19967; 2.19967; 2.19967]
# Задание 11
x11 := -4 .. 4
f11(x11) := x11^2 + x11*sin(2*x11) - (x11 - 5)*cos(x11)
root(f11(x11), x11) = [-2.97354; -2.97354; -1.93283; -2.97354; -1.93283; -1.93283; -2.97354; -1.93283; -1.93283]
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root(f11(x11), x11, -4, -2) = -2.97354
root(f11(x11), x11, -2, 4) = -1.93283
# Задание 12
n12 := 1
p12(x12) := x12^3 + (4 - n12)*x12^2 + (3 - 4*n12)*x12 - 3*n12
V12 := [3*n12; 3 - 4*n; 4 - n; 1]
X12 := polyroots(V12)
X12 = [-3.5251; 0.262551 - 0.884368i; 0.262551 + 0.884368i]
# Задание 13
A13 := [n, (n + 1), (n + 2); (n - 3), (n - 2), n; (n - 1), n, (n + 1)]
B13 := [(6*n + 8); (6*n - 7); (6*n + 2)]
[x13; y13; z13] := A13^-1*B13
[x13; y13; z13] = [1; 2; 3]
X13 := 0
Y13 := 0
Given
Z13 := 0
n*X13 + (n + 1)*Y13 + (n + 2)*Z13 == 6*n + 8
(n - 3)*X13 + (n - 2)*Y13 + n*Z13 == 6*n - 7
(n - 1)*X13 + n*Y13 + (n + 1)*Z13 == 6*n + 2
Find(X13, Y13, Z13) → [1; 2; 3]
# Задание 14
(X14^2/81) + (Y14^2/16) - 1 == (X14 - 9)^2 + (Y14 - 2)^2 - 25 solve, X14, Y14 → [9/2, 0; 549/40, 0]
# Задание 15
f15(x15) := x15*sin(x15)
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Минимум
x15 := 4
x15 := Minimize(f15, x15)
x15 = 4.91318
f15(x15) = -4.81447
f15(10) = -5.44021
Максимумы
x15 := 8
x15 := Maximize(f15, x15)
x15 = 7.97867
x15 := 2
x15 := Maximize(f15, x15)
x15 = 2.02876
