x_a := -2
y_a := -4
x_LW := 100
y_LW := 200
x_b := -3
y_b := 0
x_HW := 200
y_HW := 500
x_c := 0
y_c := 4
x_d := 3
y_d := 0
x_e := 2
y_e := -4
x_f := -2
y_f := 0
x_h := 2
y_h := 0
x_L := min(x_a, x_b, x_c, x_d, x_e) = -3
x_H := max(x_a, x_b, x_c, x_d, x_e) = 3
y_H := max(y_a, y_b, y_c, y_d, y_e) = 4
y_L := min(y_a, y_b, y_c, y_d, y_e) = -4
X := [x_a; x_f; x_b; x_c; x_d; x_h; x_e; x_a; x_f; x_h; x_e; x_a]
Y := [y_a; y_f; y_b; y_c; y_d; y_h; y_e; y_a; y_f; y_h; y_e; y_a]
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# В мировой системе координат
Δx_W := x_HW - x_LW = 100
Δx := x_H - x_L = 6
Δy_W := y_HW - y_LW = 300
Δy := y_H - y_L = 8
k_x := Δx_W/Δx = 16.6667
k_y := Δy_W/Δy = 37.5
T_SW := [k_x, 0, x_LW - k_x*x_L; 0, -k_y, y_HW + k_y*y_L; 0, 0, 1] = [16.6667, 0, 150; 0, -37.5, 350; 0, 0, 1]
[x_aw; y_aw; q] := T_SW*[x_a; y_a; 1] = [116.667; 500; 1]
T_SW = [16.6667, 0, 150; 0, -37.5, 350; 0, 0, 1]
[x_bw; y_bw; q] := T_SW*[x_b; y_b; 1] = [100; 350; 1]
[x_cw; y_cw; q] := T_SW*[x_c; y_c; 1] = [150; 200; 1]
[x_dw; y_dw; q] := T_SW*[x_d; y_d; 1] = [200; 350; 1]
[x_ew; y_ew; q] := T_SW*[x_e; y_e; 1] = [183.333; 500; 1]
[x_fw; y_fw; q] := T_SW*[x_f; y_f; 1] = [116.667; 350; 1]
[x_hw; y_hw; q] := T_SW*[x_h; y_h; 1] = [183.333; 350; 1]
X_W := [x_aw; x_fw; x_bw; x_cw; x_dw; x_hw; x_ew; x_aw; x_fw; x_hw; x_ew; x_aw]
Y_W := [y_aw; y_fw; y_bw; y_cw; y_dw; y_hw; y_ew; y_aw; y_fw; y_hw; y_ew; y_aw]
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# В оконной системе координат
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