x_a := 4
y_a := 2
x_b := 4
y_b := 8
x_c := 6
y_c := 7
x_d := 6
y_d := 3
φ_d := 90
φ := φ_d*π/180
Y_ABCD := [y_a; y_b; y_c; y_d; y_a] = [2; 8; 7; 3; 2]
X_ABCD := [x_a; x_b; x_c; x_d; x_a] = [4; 4; 6; 6; 4]
a_1 := y_b - y_c = 1
b_1 := x_c - x_b = 2
c_1 := x_b*y_c - x_c*y_b = -20
a_2 := y_a - y_d = -1
b_2 := x_d - x_a = 2
c_2 := x_a*y_d - x_d*y_a = 0
y_1(x) := (-a_1*x - c_1)/b_1
y_2(x) := (-a_2*x - c_2)/b_2
x := 0 .. 15
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A := [a_1, b_1; a_2, b_2] = [1, 2; -1, 2]
B := [-c_1; -c_2] = [20; 0]
[x_p; y_p] := A^-1*B = [10; 5]
M_ABCD := [x_a, x_b, x_c, x_d; y_a, y_b, y_c, y_d; 1, 1, 1, 1] = [4, 4, 6, 6; 2, 8, 7, 3; 1, 1, 1, 1]
T_S(Δx, Δy) := [1, 0, -Δx; 0, 1, -Δy; 0, 0, 1]
R_O(ϕ) := [cos(ϕ), sin(ϕ), 0; -sin(ϕ), cos(ϕ), 0; 0, 0, 1]
M_φ_ABCD := T_S(-x_p, -y_p)*R_O(φ)*T_S(x_p, y_p)*M_ABCD = [7, 13, 12, 8; 11, 11, 9, 9; 1, 1, 1, 1]
X_ABCD1 := transpose(M_φ_ABCD)[:, 0] = [7; 13; 12; 8]
Y_ABCD1 := transpose(M_φ_ABCD)[:, 1] = [11; 11; 9; 9]
X_φ_ABCD := stack(X_ABCD1, X_ABCD1[0]) = [7; 13; 12; 8; 7]
Y_φ_ABCD := stack(Y_ABCD1, Y_ABCD1[0]) = [11; 11; 9; 9; 11]
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